units           metal
boundary        p p p
atom_style      atomic
box tilt large
region          box block 0 12.4 0 12.4 0 12.4
create_box      2 box
pair_style      deepmd frozen.pb
pair_coeff      * *
create_atoms    1 single 3.848 6.070 2.321
create_atoms    1 single 6.848 6.070 2.321
create_atoms    2 single 3.108 6.076 1.646
create_atoms    2 single 6.508 6.076 1.646
create_atoms    2 single 4.568 6.459 1.808
create_atoms    2 single 6.468 6.459 1.808
mass            1 15.999
mass            2 1.008
velocity        all create 300 87287 mom yes rot yes dist gaussian
neighbor        0.3 bin
thermo          10
thermo_style    custom step temp pe ke etotal press
dump            1 all custom 10 dump.lammpstrj id type x y z
timestep        0.0005
run             30
